# ЛАБОРАТОРНА РОБОТА №2
# Синтез нерекурсивного цифрового фільтра
# Мета: навчитися проводити аналіз та синтез нерекурсивного цифрового фільтра
# 19 Варіант
# Исходный сигнал
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x(t) := cos(t) + cos(30*t) + 5*cos(5*t) + 10*cos(10*t) + cos(15*t)
j := sqrt(-1)
# Временной интервал ожидания аналогового сигнала:
T := 2*π
# Нормирование временного интервала ожидания сигнала:
# Шаг:
dt := 0.001
t := 0, dt .. T
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# Построение фильтра нижних частот
# Установки частот:
# Граничная частота ФНЧ: | Частота дискретизации входного сигнала:
f_g := 12/(2*π)
f_a := 6*f_g
f_g = 1.90986
f_a = 11.4592
ω_g := 2*π*f_g
ω_a := 2*π*f_a
ω_g = 12
ω_a = 72
T_g := 1/f_g
T_a := 1/f_a
T_g = 0.523599
T_a = 0.0872665
# Желаемая передаточная функция ФНЧ:
G_lpf_w(ω) := if(|ω| ≤ ω_g, 1, 0)
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# Расчет коэффициентов ФНЧ:
lpf(k) := T_a/(2*π)*integral(G_lpf_w(ω)*exp(j*ω*k*T_a), ω = -π/T_a .. π/T_a)
# Порядок ФНЧ:
N := 5
k := -N .. N
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# Сглаживающее окно фон Ганна:
w_von_Hann(k) := 1/2*(1 + cos(π*k/N))
# Сглаживающая функция Ланчоса:
σ(filter_order, k) := sin(π*k/filter_order)/(π*k/filter_order)
# Аппроксимирующая передаточная функция ФНЧ:
# Без сглаживания пульсаций:
G_lpf_d(ω) := sum(lpf(k)*exp(-j*k*ω*T_a), k = -N .. N)
# Сглаженная с помощью окна фон Ганна:
G_lpf_d_von_Hann(ω) := sum(lpf(k)*w_von_Hann(k)*exp(-j*k*ω*T_a), k = -N .. N)
# Сглаженная с помощью функции Ланчоса:
G_lpf_d_Lanczos(ω) := sum(lpf(k)*σ(N, k)*exp(-j*k*ω*T_a), k = -N .. N)
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# Количество дискретных отсчетов фильтрованного сигнала:
K := ceil(T/T_a)
K = 72
# Нерекурсивный цифровой фильтр (КИХ-фильтр, FIR-filter):
n := 0 .. K
# Без сглаживания:
y_lpf[n] := sum(lpf(k)*x(T_a*(n - k)), k = -N .. N)
# Сглаженный с помощью окна фон Ганна:
y_lpf_von_Hann[n] := sum(lpf(k)*w_von_Hann(k)*x(T_a*(n - k)), k = -N .. N)
# Сглаженный с помощью функции Ланчоса:
y_lpf_Lanczos[n] := sum(lpf(k)*σ(N, k)*x(T_a*(n - k)), k = -N .. N)
# Восстановление дискретного фильтрованного сигнала с помощью ряда Котельникова:
F_S_lpf(t) := sum(y_lpf[k]*sin(ω_a/2*(t - k*T_a))/(ω_a/2*(t - k*T_a)), k = 0 .. K)
F_S_lpf_von_Hann(t) := sum(y_lpf_von_Hann[k]*sin(ω_a/2*(t - k*T_a))/(ω_a/2*(t - k*T_a)), k = 0 .. K)
F_S_lpf_Lanczos(t) := sum(y_lpf_Lanczos[k]*sin(ω_a/2*(t - k*T_a))/(ω_a/2*(t - k*T_a)), k = 0 .. K)
low(t) := cos(t)
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# Среднее квадратическое отклонение ФНЧ, приближенного к идеальному ФНЧ:
SKO := sqrt(1/(K + 1)*sum((low(k*T_a) - F_S_lpf(k*T_a))^2, k = 0 .. K))
SKO = 7.03392
SKO_von_Hann := sqrt(1/(K + 1)*sum((low(k*T_a) - F_S_lpf_von_Hann(k*T_a))^2, k = 0 .. K))
SKO_von_Hann = 5.62988
SKO_Lanczos := sqrt(1/(K + 1)*sum((low(k*T_a) - F_S_lpf_Lanczos(k*T_a))^2, k = 0 .. K))
SKO_Lanczos = 5.84747
# Построение фильтра верхних частот
# Коэффициенты широкополосного фильтра:
bbf(z) := if(z == 0, 1, 0)
# Коэффициенты ФВЧ:
hpf(k) := bbf(k) - lpf(k)
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# Желаемая передаточная функция ФВЧ:
G_hpf_w(ω) := if(|ω| ≥ ω_g, 1, 0)
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# Аппроксимирующая передаточная функция ФВЧ:
# Без сглаживания пульсаций:
G_hpf_d(ω) := sum(hpf(k)*exp(-j*k*ω*T_a), k = -N .. N)
# Сглаженная с помощью окна фон Ганна:
G_hpf_d_von_Hann(ω) := sum(hpf(k)*w_von_Hann(k)*exp(-j*k*ω*T_a), k = -N .. N)
# Сглаженная с помощью функции Ланчоса:
G_hpf_d_Lanczos(ω) := sum(hpf(k)*σ(N, k)*exp(-j*k*ω*T_a), k = -N .. N)
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# Без сглаживания:
y_hpf[n] := sum(hpf(k)*x(T_a*(n - k)), k = -N .. N)
# Сглаженный с помощью окна фон Ганна:
y_hpf_von_Hann[n] := sum(hpf(k)*w_von_Hann(k)*x(T_a*(n - k)), k = -N .. N)
# Сглаженный с помощью функции Ланчоса:
y_hpf_Lanczos[n] := sum(hpf(k)*σ(N, k)*x(T_a*(n - k)), k = -N .. N)
# Восстановление дискретного фильтрованного сигнала с помощью ряда Котельникова:
F_S_hpf(t) := sum(y_hpf[k]*sin(ω_a/2*(t - k*T_a))/(ω_a/2*(t - k*T_a)), k = 0 .. K)
F_S_hpf_von_Hann(t) := sum(y_hpf_von_Hann[k]*sin(ω_a/2*(t - k*T_a))/(ω_a/2*(t - k*T_a)), k = 0 .. K)
F_S_hpf_Lanczos(t) := sum(y_hpf_Lanczos[k]*sin(ω_a/2*(t - k*T_a))/(ω_a/2*(t - k*T_a)), k = 0 .. K)
high(t) := cos(30*t)
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# Среднее квадратическое отклонение ФВЧ, приближенного к идеальному ФВЧ:
SKO := sqrt(1/(K + 1)*sum((high(k*T_a) - F_S_hpf(k*T_a))^2, k = 0 .. K))
SKO = 1.57303
SKO_von_Hann := sqrt(1/(K + 1)*sum((high(k*T_a) - F_S_hpf_von_Hann(k*T_a))^2, k = 0 .. K))
SKO_von_Hann = 2.69267
SKO_Lanczos := sqrt(1/(K + 1)*sum((high(k*T_a) - F_S_hpf_Lanczos(k*T_a))^2, k = 0 .. K))
SKO_Lanczos = 2.51199
# Построение полосового фильтра
# Установки частот:
# Граничная частота ФНЧ: | Частота дискретизации входного сигнала:
f_g1 := 12/(2*π)
f_g2 := 6/(2*π)
f_a := 6*f_g2
f_g1 = 1.90986
f_g2 = 0.95493
f_a = 5.72958
ω_g1 := 2*π*f_g1
ω_g2 := 2*π*f_g2
ω_a := 2*π*f_a
ω_g1 = 12
ω_g2 = 6
ω_a = 36
T_g1 := 1/f_g1
T_g2 := 1/f_g2
T_a := 1/f_a
T_g1 = 0.523599
T_g2 = 1.0472
T_a = 0.174533
# Желаемая передаточная функция ПФ:
G_lpf1_w(ω) := if(|ω| ≤ ω_g1, 1, 0)
G_lpf2_w(ω) := if(|ω| ≤ ω_g2, 1, 0)
G_bpf_w(ω) := G_lpf2_w(ω) - G_lpf1_w(ω)
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# Расчет коэффициентов ПФ:
lpf1(k) := T_a/(2*π)*integral(G_lpf1_w(ω)*exp(j*ω*k*T_a), ω = -π/T_a .. π/T_a)
lpf2(k) := T_a/(2*π)*integral(G_lpf2_w(ω)*exp(j*ω*k*T_a), ω = -π/T_a .. π/T_a)
bpf(k) := lpf2(k) - lpf1(k)
# Аппроксимирующая передаточная функция ПФ:
# Без сглаживания пульсаций:
G_bpf_d(ω) := sum(bpf(k)*exp(-j*k*ω*T_a), k = -N .. N)
# Сглаженная с помощью окна фон Ганна:
G_bpf_d_von_Hann(ω) := sum(bpf(k)*w_von_Hann(k)*exp(-j*k*ω*T_a), k = -N .. N)
# Сглаженная с помощью функции Ланчоса:
G_bpf_d_Lanczos(ω) := sum(bpf(k)*σ(N, k)*exp(-j*k*ω*T_a), k = -N .. N)
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# Без сглаживания:
y_bpf[n] := sum(bpf(k)*x(T_a*(n - k)), k = -N .. N)
# Сглаженный с помощью окна фон Ганна:
y_bpf_von_Hann[n] := sum(bpf(k)*w_von_Hann(k)*x(T_a*(n - k)), k = -N .. N)
# Сглаженный с помощью функции Ланчоса:
y_bpf_Lanczos[n] := sum(bpf(k)*σ(N, k)*x(T_a*(n - k)), k = -N .. N)
# Восстановление дискретного фильтрованного сигнала с помощью ряда Котельникова:
F_S_bpf(t) := sum(y_bpf[k]*sin(ω_a/2*(t - k*T_a))/(ω_a/2*(t - k*T_a)), k = 0 .. K)
F_S_bpf_von_Hann(t) := sum(y_bpf_von_Hann[k]*sin(ω_a/2*(t - k*T_a))/(ω_a/2*(t - k*T_a)), k = 0 .. K)
F_S_bpf_Lanczos(t) := sum(y_bpf_Lanczos[k]*sin(ω_a/2*(t - k*T_a))/(ω_a/2*(t - k*T_a)), k = 0 .. K)
brand(t) := cos(5*t)
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# Среднее квадратическое отклонение ПФ, приближенного к идеальному ПФ:
SKO := sqrt(1/(K + 1)*sum((brand(k*T_a) - F_S_bpf(k*T_a))^2, k = 0 .. K))
SKO = 7.73041
SKO_von_Hann := sqrt(1/(K + 1)*sum((brand(k*T_a) - F_S_bpf_von_Hann(k*T_a))^2, k = 0 .. K))
SKO_von_Hann = 5.41332
SKO_Lanczos := sqrt(1/(K + 1)*sum((brand(k*T_a) - F_S_bpf_Lanczos(k*T_a))^2, k = 0 .. K))
SKO_Lanczos = 5.92291
# Построение режекторного фильтра
# Коэффициенты режекторного фильтра:
rej(k) := bbf(k) - bpf(k)
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# Желаемая передаточная функция режекторного фильтра:
G_rej_w(ω) := if(|ω| ≥ ω_g2 or |ω| ≤ ω_g1, 1, 0)
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# Аппроксимирующая передаточная функция режекторного фильтра:
# Без сглаживания пульсаций:
G_rej_d(ω) := sum(rej(k)*exp(-j*k*ω*T_a), k = -N .. N)
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# Без сглаживания:
y_rej[n] := sum(rej(k)*x(T_a*(n - k)), k = -N .. N)
# Восстановление дискретного фильтрованного сигнала с помощью ряда Котельникова:
F_S_rej(t) := sum(y_rej[k]*sin(ω_a/2*(t - k*T_a))/(ω_a/2*(t - k*T_a)), k = 0 .. K)
reject(t) := cos(t) + cos(30*t) + 5*cos(5*t) + 10*cos(10*t) + cos(15*t)
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# Среднее квадратическое отклонение режекторного фильтра, приближенного к идеальному режекторному фильтру:
SKO := sqrt(1/(K + 1)*sum((reject(k*T_a) - F_S_rej(k*T_a))^2, k = 0 .. K))
SKO = 7.62155
